!   Commands inserted into this file will be executed just prior to the ANSYS SOLVE command.
!   These commands may supersede command settings set by Workbench.

!   Active UNIT system in Workbench when this object was created:  Metric (mm, kg, N, s, mV, mA)
!   NOTE:  Any data that requires units (such as mass) is assumed to be in the consistent solver unit system.
!                See Solving Units in the help system for more information.


!ИСХОДНЫЕ УСЛОВИЯ
rr=0.000				!радиус вектор эксцентриситета
deltr=0.004				!шаг по эксцентриситету
theta=0				!угол эксцентриситета, град
num_of_IEXC=1				!число итераций изменения эксцентриситета
r=32					!радиус вала
Patm=0.1				!атмосферное давлениеи

ALF=0.5				!коэффициент релаксации по давлению
max_iter=1				!максимальное число итераций
deltmax=0.0005			!максимальная невязка по зазору
popravka=0.1				!поправка на идеализированную модель


razmer=1				!размер конечного элемента
dlinna=60				!длина подшипника


CLOCAL,11,cylin,0,0,0,0,0,0	!создать цилиндрическую СК с заданными эксцентриситетами
RSYS,11			!сделать цилиндрическую СК активной

!РЕШЕНИЕ
*GET,all_element,ELEM,0,count	!число всех элементов
*GET,all_node,NODE,0,count		!число всех узлов

allsel,all				!сброс выбора (выбор всех элементов)


cmsel,s,mesto_pressure          !выбор области приложения давления (верхней поверхности лепестков соприк. с газом)
cmsel,u,line_no_force           !выбор области где не должно прикладываться давление

*GET,num_of_sel,NODE,0,count    !число узлов на выбранной поверхности

*dim,number_of_node,array,num_of_sel    !объявление массива выбранных координат лепестка x
*dim,coord_locx,array,num_of_sel        !объявление массива выбранных координат лепестка x
*dim,coord_locy,array,num_of_sel        !объявление массива выбранных координат лепестка y
*dim,coord_locz,array,num_of_sel        !объявление массива выбранных координат лепестка z
*dim,coordxn,array,num_of_sel,2     !объявление 2мерный массив с данными узлов/координат узлов X
*dim,coordyn,array,num_of_sel,2     !объявление 2мерный массив с данными узлов/координат узлов Y
*dim,new_coordxn,array,num_of_sel,2 !объявление 2мерный массив с данными узлов/координат узлов X с эксцентриситетом
*dim,coordzn,array,num_of_sel,2     !объявление 2мерный массив с данными узлов/координат узлов Z
*dim,Smvmax,array,max_iter      !объявление массива невязок
*dim,zazorP,array,num_of_sel        !объявление вспомогательного массива для невязок
*dim,num_num,array,all_element      !объявление массива номер узла/номер узла
*dim,after_Sharp,array,num_of_sel,2     !объявление 2мерный массив с данными узлов/координат узлов X


!объявление массивов узлов для каждого элемент

*dim,Press,array,num_of_sel
*dim,Pressure,array,num_of_sel

*dim,def1,array,num_of_sel      !объявление массива величин деформаций
*dim,deform,array,num_of_sel,2      !объявление 2мерный массив с данными узлов/зазоров
*dim,zazor,array,num_of_sel,2       !объявление 2мерный массив с данными узлов/зазоров

*VGET,number_of_node,node,,nlist	!Создание массива номеров выбранных узлов

!получение координат лепестка X для определённых узлов
*do,i,1,num_of_sel
	*get,coord_locx(i),node,number_of_node(i),loc,x
*enddo

!получение координат лепестка Z для определённых узлов
*do,i,1,num_of_sel
	*get,coord_locz(i),node,number_of_node(i),loc,z
*enddo

!получение координат Y лепестка для определённых узлов
*do,i,1,num_of_sel
	*get,coord_locy(i),node,number_of_node(i),loc,y
		!перевод шкалы градусов из системы -180/180 в систему 0-360
		*if,coord_locy(i),LT,0,then
		coord_locy(i)=360+coord_locy(i)
		*else
		coord_locy(i)=coord_locy(i)
		*endif
*enddo


!Создание 2 мерного массива номер узла/координатаX
*do,i,1,num_of_sel
	coordxn(i,1)=number_of_node(i)
	coordxn(i,2)=coord_locx(i)
*enddo

!Создание 2 мерного массива номер узла/координатаY
*do,i,1,num_of_sel
	coordyn(i,1)=number_of_node(i)
	coordyn(i,2)=coord_locy(i)
*enddo

!Создание 2 мерного массива номер узла/координатаZ
*do,i,1,num_of_sel
	coordzn(i,1)=number_of_node(i)
	coordzn(i,2)=coord_locz(i)
*enddo


allsel,all
cmsel,s,name_of_number      	!выбор торцевых рёбер лепестков соприкосающихся с газом
cmsel,u,line_no_force	      	!выбор области где не должно прикладываться давление (нижние элементы стыков)
nsle,r					!выбор всех узлов из предыдущих именных наборов
*VGET,one_line_number,node,,nlist	!номера выбранных узлов
*GET,num_of_line,NODE,0,count	!число узлов на выбранной линии
*dim,coord_locy_line,array,num_of_line	!объявление массива числа узлов по окружности
!получение координат Y лепестка для определённых узлов
*do,i,1,num_of_line
	*get,coord_locy_line(i),node,one_line_number(i),loc,y
		!перевод шкалы градусов из системы -180/180 в систему 0-360
		*if,coord_locy_line(i),LT,0,then
		coord_locy_line(i)=360+coord_locy_line(i)
		*else
		coord_locy_line(i)=coord_locy_line(i)
		*endif
*enddo
!Создание 2 мерного массива номер узла/координатаY
*dim,coordyn1,array,num_of_line,2		!объявление 2мерный массив с данными узлов/координат узлов Y
*do,i,1,num_of_line
	coordyn1(i,1)=number_of_node(i)
	coordyn1(i,2)=coord_locy_line(i)
*enddo

*VFUN,one_line_vozr,asort,coordyn1(1,2)	!упорядочивание массива значении координат y узлов по возрастанию

!Вычисление локального номера узла по одной окружности
max_iter_z=nint(dlinna/razmer)+1			!максимальное число элементов по длине
max_iter_y=num_of_line				!общее число элементов по окружности
delta_y=360/max_iter_y				!шаг между соседними узлами в одной окружности


*dim,mass_y,array,max_iter_y,max_iter_z,	!инициализация массива координата z/номер элемента по окружности

!Вычисление массива элементы по z -> угол элемента
*do,i,1,num_of_sel
	 nz=nint(coordzn(i,2)/razmer)	!номер элемента по оси z
       !цикл по выбора номера элемента по окружности
	*do,k,1,max_iter_y
		*if,coordyn(i,2),LT,one_line_vozr(k)+delta_y/3,and,coordyn(i,2),GT,one_line_vozr(k)-delta_y/3,then
	iy=k
		*endif
	*enddo
        mass_y(iy,nz+1)=i			!массив номер по z, номер по углу, номер элемента
*enddo

*do,i,1,num_of_sel
	num_num(number_of_node(i))=i
*enddo

allsel,all


!Создание 2 мерного массива номер узла/координата X с эксцентриситетом
*do,i,1,num_of_sel
	new_coordxn(i,1)=number_of_node(i)
!	new_coordxn(i,2)=sqrt(r**2-rr*sin(coord_locy(i)+theta)**2)+rr*cos(coord_locy(i)+theta)
	new_coordxn(i,2)=r+rr*cos((coord_locy(i)+theta)*3.14/180)
*enddo
allsel,all

/prep7
csys,1
RSYS,11							!сделать цилиндрическую СК активной
et,100000,combin14						! COMBIN14 spring-damper element
keyopt,100000,3,0						! Longitudinal spring damper element (UX DOF)
r,100000,16.0							! Spring constant
gof=48 !пока пусть 48 гофров всего по кругу
num_node_spr_okr=num_of_line/gof !10
zzz=all_node

*dim,exel,array,gof
exel(1)=1,5,9,13,17,21,25,29,34,39,
exel(11)= 43,47,51,55,59,63,67,71,75,79
exel(21)=84,89,93,97,101,105,109,113,117,121
exel(31)=125,129,134,139,143,147,151,155,159,163
exel(41)=167,171,175,179,184,189,193,197

!разворот системы координат узлов в локальную СК
nrotat,all


*do,kk,1,max_iter_z
	*do,i,1,gof
		zzz=zzz+1
		n,zzz,35,coord_locy(mass_y(exel(i),kk)),kk-1
		d,zzz,ux,0
		d,zzz,uy,0
		d,zzz,uz,0
		d,zzz,rotx,0
		d,zzz,roty,0
		d,zzz,rotz,0
		type,100000
		real,100000
		nrotat,all
		e,zzz,mass_y(exel(i),kk)
	*enddo
*enddo

*dim,pribavka,array,num_of_IEXC
pribavka(1)=deltr*2


!ЦИКЛ ПО ИЗМЕНЕНИЮ ЭКЦЕНТРИСИТЕТА
*do,M,1,num_of_IEXC
rr=rr+deltr

!Создание 2 мерного массива номер узла/координата X с эксцентриситетом
*do,i,1,num_of_sel
	new_coordxn(i,1)=number_of_node(i)
!	new_coordxn(i,2)=sqrt(r**2-rr*sin(coord_locy(i)+theta)**2)+rr*cos(coord_locy(i)+theta)
	new_coordxn(i,2)=r+rr*cos((coord_locy(i)+theta)*3.14/180)
*enddo

!инициализация массива давлений
*dim,p,array,num_of_sel,2			!объявление 2мерный массив с данными узлов/зазоров


!ЦИКЛ ПО ИЗМЕНЕНИЮ ЭКЦЕНТРИСИТЕТА
*do,M,1,num_of_IEXC
rr=rr+deltr

!Создание 2 мерного массива номер узла/координата X с эксцентриситетом
*do,i,1,num_of_sel
	new_coordxn(i,1)=number_of_node(i)
!	new_coordxn(i,2)=sqrt(r**2-rr*sin(coord_locy(i)+theta)**2)+rr*cos(coord_locy(i)+theta)
	new_coordxn(i,2)=r+rr*cos((coord_locy(i)+theta)*3.14/180)
*enddo

!инициализация массива давлений
*dim,p,array,num_of_sel,2			!объявление 2мерный массив с данными узлов/зазоров

!ЦИКЛ ПО ИЗМЕНЕНИЮ ДАВЛЕНИЯ
*do,k,1,max_iter
allsel,all
/solu

!приложение силы к выбранным узлам в повёрнутой СК
*do,i,1,num_of_element
    SFE,number_of_elem(i),,Pres,1,Press(i)
*enddo

allsel,all
solve

/post1
set,last					!выбор данных последнего шага нагружения
CLOCAL,11,cylin,ux,uy,uz,0,0,0		!создать цилиндрическую СК с заданными эксцентриситетами
RSYS,11					!сделать цилиндрическую СК активной

!получение перемещений лепестка для определённых узлов
*do,i,1,num_of_sel
	*get,def1(i),node,number_of_node(i),U,x
*enddo

!Создание 2 мерного массива номер узла/перемещение
*do,i,1,num_of_sel
	deform(i,1)=number_of_node(i)
	deform(i,2)=def1(i)
*enddo

!*cfopen,'D:\bearing\BBEEAARRIINNGG\Number_node_coord1',txt
!*vwrite,coordxn(1,1),coordxn(1,2),coordyn(1,2),coordzn(1,2),deform(1,2)
!(' 'F15.0,' 'G10.4,' 'G10.4,' 'G10.4,' 'G10.4,)
!*cfclos

!/sys, D:\bearing\BBEEAARRIINNGG\Charp_mesh_apdl.exe

*vread,Pressure,'D:\bearing\BBEEAARRIINNGG\Pressure_CSharp',txt,,
(' 'F13.10,)

*cfopen,'D:\bearing\BBEEAARRIINNGG\Test_CSharp',txt
*vwrite,Pressure(1,1)
(' 'F13.10,)
*cfclos


*enddo !Давление
*enddo !Эксцентриситет
